######################## Variables ###############################
variable E_np equal 1.0
variable E_pp equal 1
variable Pfix equal 0.0
variable Tfix equal 1.0

variable N_p equal 3.0
variable D_p equal 1.587
variable D_n equal 1
variable D_np equal 0.5*(${D_p}+${D_n})
variable Rc_np equal 2.5*${D_np}
variable Rc_pp equal 2.5*${D_p}
variable M_p equal 4

variable tstep equal 0.002
variable T_dp equal 100*${tstep}
variable P_dp equal 1000*${tstep}

variable A equal 100.0

variable Rmin equal 1.1
variable Cprob equal 0.3
variable Cseed equal 25495

log ./lmp_log_Dp${D_p}_Np${N_p}_Enp${E_np}-lj-xln.lammps

######################## INITIALIZATION ###############################
units	lj
dimension	3
boundary	p p p
atom_style	full

######################## Read File ###############################
read_restart ./re-soft

neigh_modify exclude molecule/intra pene
######################## Potential Information ###############################
###------------------------ Pair potential ------------------------
pair_style	lj/cut 2.5

### atoms with type 1-5 are polymer beads
pair_coeff	1*5	1*5	1.0 		${D_n}						#bead-bead
pair_coeff	1*5	6	${E_np}		${D_np}	${Rc_np}		#bead-penetrant
pair_coeff	6	6	${E_pp}		${D_p}	${Rc_pp}		#penetrant-penetrant

###------------------------ Harmonic potential ------------------------
bond_style	harmonic
bond_coeff	* 1000.0 1.000			## K(1/2 included) equilibrium bond distance
bond_coeff	4 1000.0 1.587			## K(1/2 included) equilibrium bond distance

###------------------------ Bending potential ------------------------
angle_style	cosine
angle_coeff * 1.52						## K (energy)
angle_coeff 4 1000						## K (energy)

###------------------------ Special bond ------------------------
### To turn on the 1-3 and 1-4 interactions and turn off the 1-2 interaction
special_bonds lj 0.0 1.0 1.0

### For a lj units system with FENE bonds, a setting of special bonds 0 1 1 should be used:
### turn on the 1-3, and 1-4 interactions and turn off the 1-2 interaction.
#special_bonds fene angle no dihedral no

######################## Set Time Step ###############################
timestep	${tstep}

###------------------------ Propertry compute ------------------------
compute 	cbond 	all 	property/local btype batom1 batom2
compute 	cangle 	all 	property/local atype aatom1 aatom2 aatom3

######################## Boundary Conditions ###############################

###------------------------ (1-1) Relax system at NVT  ------------------------
reset_timestep 0
fix f11 all	nvt temp ${Tfix} ${Tfix} ${T_dp}

thermo 30000
thermo_style custom step xhi temp press evdwl ebond eangle etotal pe ke
run_style	verlet
run 150000
unfix f11

###------------------------ (1-2) Relax system at NPT (P=1~0) ------------------------
reset_timestep 0
fix f12 all	npt	temp ${Tfix} ${Tfix} ${T_dp} iso 1 ${Pfix} ${P_dp}

thermo 30000
thermo_style custom step xhi temp press evdwl ebond eangle etotal pe ke
run_style	verlet
run 300000
unfix f12

###------------------------ (2) Relax system before crosslinking  ------------------------
reset_timestep 0
fix f2 all	npt	temp ${Tfix} ${Tfix} ${T_dp} iso ${Pfix} ${Pfix} ${P_dp}

thermo 500000
thermo_style custom step xhi temp press evdwl ebond eangle etotal pe ke
run_style	verlet
run 15000000
unfix f2

###------------------------ (3) Crosslink to form a network  ------------------------
reset_timestep 0

dump	d2 bead local 3000 ./b_xl_all.txt c_cbond[1] c_cbond[2] c_cbond[3]

fix f3 all	npt	temp ${Tfix} ${Tfix} ${T_dp} iso ${Pfix} ${Pfix} ${P_dp}
fix f3cross bead bond/create 1000 1 2 ${Rmin} 3 prob ${Cprob} ${Cseed} atype 3 iparam 1 3 jparam 1 2

thermo 30000
thermo_style custom step xhi temp press evdwl ebond eangle etotal pe ke
run_style	verlet
run 600000
unfix f3
unfix f3cross
undump d2

###------------------------ (4) Relax system after crosslinking  ------------------------
reset_timestep 0
fix f4 all	npt	temp ${Tfix} ${Tfix} ${T_dp} iso ${Pfix} ${Pfix} ${P_dp}

thermo 500000
thermo_style custom step xhi temp press evdwl ebond eangle etotal pe ke
run_style	verlet
run 5000000
unfix f4

###------------------------ (5) Production run (diffusion at T=1)  ------------------------
reset_timestep 0
dump 	d1 all custom 300000 ./diff_T${Tfix}_nw.bin id mol type mass q x y z
dump_modify d1 sort id

fix f5 all	npt	temp ${Tfix} ${Tfix} ${T_dp} iso ${Pfix} ${Pfix} ${P_dp}

write_restart ./re-nw-T${Tfix}
thermo 300000
thermo_style custom step xhi temp press evdwl ebond eangle etotal pe ke
run_style	verlet
run 15000000
unfix f5
undump d1

###------------------------ Jump to next ------------------------
echo	log
print "All done"
